<?xml version="1.0"?>
<!-- Generated by javaprop

     Inputs:
          Number of Blades:  2
                       rpm: 1250
         prop diameter (M): 2.59
      spinner diameter (M): 0.0
            velocity (m/s): 50.5
                     power: 9.6 kWatts

       static thrust (lbs): 601

-->

<propeller name="2 blade fixed pitch wooden prop">

	<!--
	<ixx> is the rotational moment of inertia for the propeller/engine combination.
	Small numbers accelerate faster but bounce around more. Large numbers
	accelerate slower and regulate smoother.

Propellor

	I = m*D^2
	    _____
		 12


	m=18kg
	d=2.59m

	I =		10.1kgm^2

Engine Block

	I = m*r^2
	   ______
		 2

	r = 0.37m
	m = 159kg

	I =		10.9kgm^2

Combined

	I = A + B

	A = 10.1
	B = 10.9

	I = 	21kgm^2 - used in precession calcs engine.xml
	-->

	<ixx> 15.48 </ixx>

	<!--
	Prop Characteristics
	-->


	<diameter unit="IN"> 102.0 </diameter>
	<numblades> 2 </numblades>
	<constspeed> 0 </constspeed>

  	<!--
	<gearratio> is the gearing between the prop and the engine,
	Normally it's defined from the engine to the propeller and is a value below zero
	ie 0.78
	To specify from the propeller to the engine use 1/X = gearration = 1/0.78 = 1.28
	-->

	<gearratio> 1.0 </gearratio>

	<!--
	<ct_factor> is the props co-efficent of thrust 'tuning' factor
	<cp_factor> is the props co-efficent of power 'tuning' factor
	-->
	<ct_factor> 1.0 </ct_factor>
	<cp_factor> 1.0 </cp_factor>


  <table name="C_THRUST" type="internal">
     <tableData>

0.00	0.11391
0.10	0.114806
0.20	0.114548
0.30	0.112307
0.40	0.107338
0.50	0.099025
0.60	0.08631
0.70	0.070687
0.80	0.054272
0.90	0.037212
1.00	0.019733
1.10	0.001875
1.20	-0.015983
1.30	-0.033462
1.40	-0.050522
1.50	-0.066937

     </tableData>
  </table>


  <table name="C_POWER" type="internal">
     <tableData>

0.00	0.076355
0.10	0.08071
0.20	0.076954
0.30	0.076539
0.40	0.076772
0.50	0.076237
0.60	0.072769
0.70	0.065772
0.80	0.056116
0.90	0.043869
1.00	0.028855
1.10	0.01107
1.20	-0.006715
1.30	-0.021729
1.40	-0.033976
1.50	-0.043632

     </tableData>
  </table>

	<!-- thrust effects of helical tip Mach -->
	<table name="CT_MACH" type="internal">
		<tableData>
			0.85   1.0
			1.05   0.8
		</tableData>
	</table>

	<!-- power-required effects of helical tip Mach -->
	<table name="CP_MACH" type="internal">
		<tableData>
			0.85   1.0
			1.05   1.8
		</tableData>
	</table>

</propeller>
