<?xml version="1.0"?>


<!-- Generated by Ron Jensen

With a constant speed propeller you can achieve the same RPM with a variety of horsepower.
Use a prony brake as test load.
Set the advance-cmd-norm to 1/10000 of the RPM you want to achieve
for 2100 rpm set 0.21).
You can then sweep the throttle to see what effect throttling has on the model.
Or you can hold the throttle constant and sweep the RPM via the advance-cmd-norm and
see what effect that has on power.
Finally, you can look at the prony fdm's 'propeller-pitch' to see what coefficient is
being used for a given power setting.
-->


<propeller name="Prony">

  <ixx> 2.4 </ixx>

  <diameter unit="IN"> 72.0 </diameter>

  <numblades>  2 </numblades>

  <minpitch>   0 </minpitch>

  <maxpitch>  90 </maxpitch>

  <minrpm>     0 </minrpm>

  <maxrpm> 10000 </maxrpm>

<ct_factor>0.0</ct_factor>

<cp_factor>1.0</cp_factor>

  <table name="C_THRUST" type="internal">

    <tableData>

         0    10   20   30   40   50   60   70   80   90

    0.0  0.0  0.0  0.0  0.0  0.0  0.0  0.0  0.0  0.0  0.0

    1.0  0.0  0.0  0.0  0.0  0.0  0.0  0.0  0.0  0.0  0.0

    </tableData>

  </table>

  <table name="C_POWER" type = "internal">

    <tableData>

          0        10      20      30      40      50      60      70      80      90

     0.0  0.00002  1.0000  2.0000  3.0000  4.0000  5.0000  6.0000  7.0000  8.0000  9.0000

     1.0  0.00002  1.0000  2.0000  3.0000  4.0000  5.0000  6.0000  7.0000  8.0000  9.0000

    </tableData>

  </table>


</propeller>
